// COMSOL Multiphysics 5.4.0.295 model "RTM_noAcclimation.mph"
// Outline of the model tree

Parameters
  chi = 2  // Average stoichiometric number
  D = 1e-8[1/s]  // Specific maintenance rate
  dGp = 45000[J/mol]  // Phosphorylation energy
  R = 8.3145[J/mol]  // Gas constant
  Tk = 273.15+25[K]  // Temperature in Kelvin
  Xmax = 2[mol/m^3]  // Carrying capacity; assuming biomass has a molecular weight of 1 g/mol (this assumption does not affect results.
  logK = 2.6407  // log K value for acetate to bicarbonmate and dissolved methane at 25 degree c
  co_ac = 10 [mol/m^3]  // Initial acetate concentration
  gsize = 0.1[m]  // grid size
  lnK = log(10^logK)  // natural log of K
  porosity = 0.9  // Porosity of sediments

Functions
  rn8: Random "rnk_sarcina" | funcname = rnk_sarcina; nargs = 2; mean = 2.27e-6/porosity; uniformrange = 1.166e-6/porosity; seed = 113020
  rn9: Random "rnk_saeta" | funcname = rnk_saeta; nargs = 2; mean = 6.42e-7/porosity; uniformrange = 5.67e-7/porosity; seed = 113021
  rn10: Random "rnks_sarcina" | funcname = rnks_sarcina; nargs = 2; mean = 4.44; uniformrange = 2.28; seed = 3503451
  rn11: Random "rnks_saeta" | funcname = rnks_saeta; nargs = 2; mean = 0.805; uniformrange = 0.48; seed = 3503452
  rn12: Random "rny_sarcina" | funcname = rny_sarcina; nargs = 2; mean = 2.29; uniformrange = 0.85; seed = 3503453
  rn13: Random "rny_saeta" | funcname = rny_saeta; nargs = 2; mean = 1.327; uniformrange = 0.228; seed = 3503454
  rn14: Random "Xo" | funcname = Xo; nargs = 2; mean = 0.01; uniformrange = 0.005; seed = 3503455
  an14: Analytic "Ye" | funcname = Ye; expr = rny_saeta(ceil(x/gsize),ceil(y/gsize)); args = {x, y}
  an15: Analytic "Yr" | funcname = Yr; expr = rny_sarcina(ceil(x/gsize),ceil(y/gsize)); args = {x, y}
  an16: Analytic "ke" | funcname = ke; expr = rnk_saeta(ceil(x/gsize),ceil(y/gsize)); args = {x, y}
  an17: Analytic "kr" | funcname = kr; expr = rnk_sarcina(ceil(x/gsize),ceil(y/gsize)); args = {x, y}
  an18: Analytic "fkr" | funcname = fkr; expr = s/(s+rnks_sarcina(ceil(x/gsize),ceil(y/gsize))); args = {x, y, s}
  an19: Analytic "fke" | funcname = fke; expr = s/(s+rnks_saeta(ceil(x/gsize),ceil(y/gsize))); args = {x, y, s}
  an20: Analytic "ft" | funcname = ft; expr = max(0,(1.0-(10^(log10(p1*gamma_ch4)+log10(p2*gamma_hco3)-log10(gamma_h2o)-log10(r1*gamma_ac)-logK))^(1/chi)*exp(0*(Y_ATP)*dGp/(chi*R*Tk)))); args = {p1, p2, r1, Y_ATP}

Variables
  var1 "Variables 1"
    co_ch4 = 0.1 [mol/m^3]  // initial concentration
    co_hco3 = 2[mol/m^3]  // initial concentration
    gamma_hco3 = 0.87*0.8  // activity coefficient and fraction in total dissolved component, obtained from geochemical reaction modeling
    gamma_ac = 0.87*0.98  // activity coefficient and fraction in total dissolved component, obtained from geochemical reaction modeling
    gamma_ch4 = 1  // activity coefficient and fraction in total dissolved component, obtained from geochemical reaction modeling
    gamma_h2o = 1  // activity coefficient and fraction in total dissolved component, obtained from geochemical reaction modeling
    c_inlet = 10[mol/m^3]  // Acetate concentration in inlet fluid

Geometry
  geom1 "Geometry 1(2D)" (2D, length unit m)
    r1: Rectangle | size = {10, 4}
    fin: Finalize "Form Union"

Materials
  mat1: Common "Granite" on all domains
    def "Basic"
      thermalexpansioncoefficient = 7e-6[1/K]
      heatcapacity = 850[J/(kg*K)]
      density = 2600[kg/m^3]
      thermalconductivity = 2.9[W/(m*K)]
    Enu "Young's modulus and Poisson's ratio"
      youngsmodulus = 60e9[Pa]
      poissonsratio = 0.25

Physics
  chem2: Chemistry on all domains
    TPFeatureInput.T_src = userdef
    TPFeatureInput.T = 293.15[K]
    calcThermo.calcThermo = 0
    calcTransport.calcTransport = 0
    mixture.liquidDensitySel = Automatic
    mixture.hasPropertyPackage = 0
    mixture.Thermodynamics = 0
    mixture.mixture = liquid
    ChemistryModelInputParameter.ConcentrationInput = {1, max(1e-3, c3Xsaeta), max(1e-3, c3Xsarcina), max(1e-5, c3acetate), c3ch4, co_h2o, c3hco3}
    Activity.useActivity = 0
    ChemistryCommonProperty.VolumetricConcentrationGlobalActivityStandardState = 1[mol/m^3]
    ChemistryCommonProperty.SurfaceSpeciesConcentrationType = SurfaceConcentration
    ChemistryCommonProperty.SurfaceGlobalActivityStandardState = 1[mol/m^2]
    ChemistryCommonProperty.SpeciesrateUserDefinedList = {h2o, C}
    ChemistryCommonProperty.AdditionalSourceFeature = 0
    simpropChem.rSequenceNo = 6
    simpropChem.sSequenceNo = 13
    solventIsSet.solventIsSet = 0
    chemkin.chemkin = 0
    ActiveSpecies.SumActiveSpecies = 7
    ActiveSpecies.NumActiveVolumeSpecies = 7
    ActiveSpecies.NumActiveSurfaceSpecies = 0
    ActiveSpecies.NumActiveSurfaceSpeciesVariable = 0
    ActiveSpecies.surface = 0
    rch1: ReactionChem "1: acetate+h2o<=>hco3+ch4" on all domains
      updatechem = 0
      rClass = volumetric
      ReactionExpression = UserDefined
      useArrhenius = 0
      setKeq0 = 0
      rSequenceNo = 1
      formula = acetate+h2o<=>hco3+ch4
      kf = 1
      kr = 1
      r = comp2.kr(x,y)*comp2.fkr(x,y,c_acetate)*c_Xsarcina*comp2.ft((c_ch4/1e3), (c_hco3/1e3), (c_acetate/1e3),(comp2.Yr(x,y)/4.5))
    rch2: ReactionChem "2: acetate+h2o<=>hco3+ch4" on all domains
      updatechem = 0
      nf = 0
      Ef = 0
      nr = 0
      Er = 0
      rClass = volumetric
      ReactionExpression = UserDefined
      useArrhenius = 1
      setKeq0 = 0
      rSequenceNo = 2
      formula = acetate+h2o<=>hco3+ch4
      kf = 1
      kr = 1
      Af = 1
      Ar = 1
      r = comp2.ke(x,y)*comp2.fke(x,y,c_acetate) *c_Xsaeta *comp2.ft((c_ch4/1e3), (c_hco3/1e3), (c_acetate/1e3), (comp2.Ye(x,y)/4.5))
    rch3: ReactionChem "3: C<=>Xsarcina" on all domains
      updatechem = 0
      rClass = volumetric
      ReactionExpression = UserDefined
      useArrhenius = 0
      setKeq0 = 0
      rSequenceNo = 3
      formula = C<=>Xsarcina
      kf = 1
      kr = 1
      r = comp2.Yr(x,y)*r_1*(1- (c_Xsarcina+c_Xsaeta)/Xmax)-D*c_Xsarcina
    rch4: ReactionChem "4: C<=>Xsaeta" on all domains
      updatechem = 0
      rClass = volumetric
      ReactionExpression = UserDefined
      useArrhenius = 0
      setKeq0 = 1
      rSequenceNo = 4
      formula = C<=>Xsaeta
      kf = 1
      kr = 1
      r = comp2.Ye(x,y)*r_2*(1-(c_Xsarcina+c_Xsaeta)/Xmax)-D*c_Xsaeta
    acetate: SpeciesChem "Species: acetate" on all domains
      sisDef = 1
      sType = volumetric
      z = 0
      cLock = 0
      Dependent = 0
      SpeciesSource = Reaction
      specLabel = acetate
      sigma = 3.458[angstrom]
      epsilonkb = 107.4[K]
      mu = 0[C*m]
      ActivityCoefficient = 1
      k = 0.02[W/(m*K)]
      SpeciesrateSelection = Automatic
      specName = acetate
      Speciesrate = (-chem2.r_1-chem2.r_2)*porosity
      dependent = 0
      M = 0.032[kg/mol]
      rho = 1000[kg/m^3]
    h2o: SpeciesChem "Species: h2o" on all domains
      sisDef = 1
      sType = volumetric
      z = 0
      cLock = 1
      Dependent = 0
      SpeciesSource = Reaction
      specLabel = h2o
      sigma = 3.458[angstrom]
      epsilonkb = 107.4[K]
      mu = 0[C*m]
      ActivityCoefficient = 1
      k = 0.02[W/(m*K)]
      SpeciesrateSelection = Automatic
      specName = h2o
      dependent = 0
      M = 0.032[kg/mol]
      rho = 1000[kg/m^3]
    hco3: SpeciesChem "Species: hco3" on all domains
      sisDef = 1
      sType = volumetric
      z = 0
      cLock = 0
      Dependent = 0
      SpeciesSource = Reaction
      specLabel = hco3
      sigma = 3.458[angstrom]
      epsilonkb = 107.4[K]
      mu = 0[C*m]
      ActivityCoefficient = 1
      k = 0.02[W/(m*K)]
      SpeciesrateSelection = Automatic
      specName = hco3
      Speciesrate = (chem2.r_1+chem2.r_2)*porosity
      dependent = 0
      M = 0.032[kg/mol]
      rho = 1000[kg/m^3]
    ch4: SpeciesChem "Species: ch4" on all domains
      sisDef = 1
      sType = volumetric
      z = 0
      cLock = 0
      Dependent = 0
      SpeciesSource = Reaction
      specLabel = ch4
      sigma = 3.458[angstrom]
      epsilonkb = 107.4[K]
      mu = 0[C*m]
      ActivityCoefficient = 1
      k = 0.02[W/(m*K)]
      SpeciesrateSelection = Automatic
      specName = ch4
      Speciesrate = (chem2.r_1+chem2.r_2)*porosity
      dependent = 0
      M = 0.032[kg/mol]
      rho = 1000[kg/m^3]
    C: SpeciesChem "Species: C" on all domains
      sisDef = 1
      sType = volumetric
      z = 0
      cLock = 1
      Dependent = 0
      SpeciesSource = Reaction
      specLabel = C
      sigma = 3.458[angstrom]
      epsilonkb = 107.4[K]
      mu = 0[C*m]
      ActivityCoefficient = 1
      k = 0.02[W/(m*K)]
      SpeciesrateSelection = Automatic
      specName = C
      dependent = 0
      M = 0.032[kg/mol]
      rho = 1000[kg/m^3]
    Xsarcina: SpeciesChem "Species: Xsarcina" on all domains
      sisDef = 1
      sType = volumetric
      z = 0
      cLock = 0
      Dependent = 0
      SpeciesSource = Reaction
      specLabel = Xsarcina
      sigma = 3.458[angstrom]
      epsilonkb = 107.4[K]
      mu = 0[C*m]
      ActivityCoefficient = 1
      k = 0.02[W/(m*K)]
      SpeciesrateSelection = Automatic
      specName = Xsarcina
      dependent = 0
      M = 0.032[kg/mol]
      rho = 1000[kg/m^3]
    Xsaeta: SpeciesChem "Species: Xsaeta" on all domains
      sisDef = 1
      sType = volumetric
      z = 0
      cLock = 0
      Dependent = 0
      SpeciesSource = Reaction
      specLabel = Xsaeta
      sigma = 3.458[angstrom]
      epsilonkb = 107.4[K]
      mu = 0[C*m]
      ActivityCoefficient = 1
      k = 0.02[W/(m*K)]
      SpeciesrateSelection = Automatic
      specName = Xsaeta
      dependent = 0
      M = 0.032[kg/mol]
      rho = 1000[kg/m^3]
  tds2: DilutedSpecies "Transport of Diluted Species 2" on all domains
    dependent variable c3acetate = {c3acetate, c3ch4, c3hco3}
    cdm1: ConvectionDiffusionMigration "Transport Properties 1" (default)
      minput_temperature = 298.15[K]
      u = {1.15741e-6, 0, 0}
      D_c3acetate = 0.6e-9[m^2/s]
      D_c3ch4 = 0.6e-9[m^2/s]
      D_c3hco3 = 0.6e-9[m^2/s]
    nflx1: NoFlux (default)
    init1: init "Initial Values 1" (default) | initc = {co_ac, co_ch4, co_hco3}
    reac1: Reactions on all domains
      R_c3acetate_src = root.comp2.chem2.R_acetate
      R_c3ch4_src = root.comp2.chem2.R_ch4
      R_c3hco3_src = root.comp2.chem2.R_hco3
    in1: Inflow on boundaries 1 | c0 = {c_inlet, co_ch4, co_hco3}; BoundaryConditionType = FluxDanckwerts
    out1: Outflow on boundaries 4
  tds: DilutedSpecies "Transport of Diluted Species" on all domains
    dependent variable c3Xsarcina = {c3Xsarcina, c3Xsaeta}
    cdm1: ConvectionDiffusionMigration "Transport Properties 1" (default)
      minput_temperature = 298.15[K]
      D_c3Xsarcina = 0[m^2/s]
      D_c3Xsaeta = 0[m^2/s]
      D_c2 = 0[m^2/s]
      D_cXsarcina = 0[m^2/s]
      D_cXsaeta = 0[m^2/s]
      D_c3C = 0[m^2/s]
    nflx1: NoFlux (default)
    init1: init "Initial Values 1" (default)
      initc = {comp2.Xo(ceil(x/gsize),ceil(y/gsize)), comp2.Xo(ceil(x/gsize),ceil(y/gsize))}
    reac1: Reactions on all domains
      R_c3Xsarcina_src = root.comp2.chem2.R_Xsarcina
      R_c3Xsaeta_src = root.comp2.chem2.R_Xsaeta
    in1: Inflow on boundaries 1 | c0 = {0.1, 0.1}; BoundaryConditionType = FluxDanckwerts
    out1: Outflow on boundaries 4

Mesh
  mesh1 "Mesh 1"
    size: MeshSizeDefault | hmax = 0.05; hmin = 0.05; hcurve = 0.6; hnarrow = 0.5; hgrad = 1.5; hauto = 1; custom = on
    fq1: FreeQuad on remaining entities

Studies
  std2 "Study 2"
    time: Transient "Time Dependent" | tunit = d; tlist = 10^{range(0,7/23,7)}

Solver configurations
  sol1 "Solution 1" (study std2)
    v1: Variables "Dependent Variables 1"
    t1: Time "Time-Dependent Solver 1" | tlist = 10^{range(0,7/23,7)}; rtol = 0.005; maxorder = 2
      fc1: FullyCoupled
        linsolver = d1
        maxiter = 8
        damp = 0.9
        jtech = once
        stabacc = aacc
        aaccdim = 5
        aaccmix = 0.9
        aaccdelay = 1
      d1: Direct | linsolver = pardiso; pivotperturb = 1.0E-13

Datasets
  dset1: Solution | solution = sol1

Plots
  pg1: PlotGroup2D "2D Plot Group 1" | data = dset1
    surf1: Surface | expr = c3acetate
  pg2: PlotGroup2D "Concentration (tds2)" | data = dset1
    surf1: Surface | expr = c3acetate
  pg3: PlotGroup2D "Concentration (tds)" | data = dset1
    surf1: Surface | expr = c3Xsaeta